// SBML level 3 version 1

function Function_for_R1f_1(cell, foo, bar)
  cell*foo*bar;
end

model calculateUnits()
  // model units - substance: mole, time: second, volume: litre, extent: mole

  // Compartments:
  compartment cell = 1 litre;

  // Species:
  species Species1 in cell = 0.5;

  // Parameters:
  known = Species1*k2; known has mole;
  known1 has metre;
  known2 has knownUnits;
  known3 has litre;
  known4 has litre;
  known5 has second;
  known6 = sr2*cell; known6 has metre;
  k1 = ;
  k2 = ;
  a = ;
  b = Species1*k2;
  c = known*known;
  d = 1 + known;
  f = ;
  g = ;
  h = ;
  k = ;
  l = ;
  m = ;
  n = R1^2;
  o = R2^2;
  p = sr1*known1;
  q = ;
  r = ;
  s = ;
  t = ;

  // Assignment rules:
  known2 := known1/a;
  e := known2 - 3;

  // Rate rules:
  h' = known2;
  known4' = k*cell;

  // Reactions:
  R: Species1 => ; Function_for_R1f_1(cell, Species1/k1, 1);
  R1: Species1 => ; cell*(Species1/known5);
  R2: Species1 + Species1 => ; a*(b/c);
  R3: Species1 => ; q*(Species1/R3_local);
  R4: Species1 => ; r*(Species1/R4_local);
  R5: Species1 => ; cell*(Species1/R5_local);

  // Events:
  e1: at (l/known2) after (1 != 2), t0=false, persistent=false: f = cell*Species1, t = s*Species1, known3 = cell*g;
  e2: at (1 != 2), priority = m, t0=false, persistent=false: f = cell*Species1, known3 = cell*g, t = cell*Species1;

  // Unit definitions:
  unit knownUnits = metre / second;
end
